# 土壤和地下水修复;原位;地下水抽出处理;施工;抽水井

Dataset: ILCD process, Unit process, single operation
Geography: CA
Reference year: 2007
Classification: Other Services / Repair and maintenance
Generated by: 王宁, wang_ning@caep.org.cn
Owner: 天工LCI数据工作小组
Review: Dependent internal review by 天工LCI数据工作小组
Amounts: no units in this file; such an amount is in the reference unit of its flow, which a separate flow dataset defines
copyright: false
licenseType: Free of charge for all users and uses

## General comment
使用聚氯乙烯、石英砂、膨润土、混凝土建造个3抽水井

## Geography
The contaminated area was located 600 m from a river shore in the northern part of the prov-ince of Quebec， Canada.

## Technology and included processes
使用柴油、聚氯乙烯、石英砂、膨润土、混凝土建造个3抽水井

## Technical purpose
所描述的工业过程涉及建设三个抽水井，用于土壤和地下水的修复。这些井被用于加拿大魁北克省北部河岸600米处原位环境修复项目中的抽水和处理方法。在这一特定应用中，所使用的材料主要是为了环境修复和建设目的，以管理地下水污染。

## Reference product
- Extraction wel: 3; estimated
  在现场建造三个抽提井

## Inputs
All rows: estimated
- Polyvinyl chloride: 459.1
  成井过程消耗的PVC管
- Diesel: 2.5
  钻孔过程钻机所消耗的柴油
- quartz sand: 1036
  成井过程消耗的石英砂
- bentonite: 843.4
  成井过程消耗的石膨润土
- cement: 210.1
  成井过程消耗的水泥

## Use advice
生命周期评估数据集的用户应考虑使用指定材料（如聚氯乙烯、石英砂、膨润土、混凝土和柴油）建造抽水井的技术适用性。在模拟使用阶段时，应注意场地的特定环境条件，如与水体的接近性和污染物的属性。是否包括这些材料的下游循环再造过程应基于场地特定的法规要求和环境目标来确定。

## Review details
清单： 内部审查通过几个迭代步骤完成，涉及原始数据验证、原始数据记录、代表性、完整性、与 ISO 14040 和 14044 有关的建模的一致性。
