# 土壤和地下水修复;原位;地下水抽出处理;施工;设备和材料到场

Dataset: ILCD process, Unit process, single operation
Geography: CA
Reference year: 2007
Classification: Other Services / Repair and maintenance
Generated by: 王宁, wang_ning@caep.org.cn
Owner: 天工LCI数据工作小组
Review: Dependent internal review by 天工LCI数据工作小组
Amounts: no units in this file; such an amount is in the reference unit of its flow, which a separate flow dataset defines
copyright: false
licenseType: Free of charge for all users and uses

## General comment
将所需材料和设备运至现场

## Geography
The contaminated area was located 600 m from a river shore in the northern part of the prov-ince of Quebec， Canada.

## Technology and included processes
消耗柴油将设备与材料运输到项目现场

## Technical purpose
所描述的工业过程用于环境修复，专门针对土壤和地下水污染。该过程涉及“抽取和处理”方法，其中污染的地下水被提取并在原位之外（现场外）进行处理，作为施工和修复工作的一部分。设备和材料被运输到修复现场进行安装和操作。

## Reference product
- Equipment and Materials Arriving on Site: 1; estimated
  到达现场的设备和材料

## Inputs
- Diesel: 79.8; estimated
  将所需材料和设备运至现场所需要的柴油

## Use advice
此数据集代表土壤和地下水修复项目的运输和现场准备阶段。数据使用者应注意，包括与材料和设备运输相关的排放和资源使用在内。这包括运输车辆的柴油输入。在将这些数据用于生命周期评估（LCA）时，请确保其正确归因于项目的现场准备阶段，并考虑运输距离和相关的环境负担。对于不同位置或有不同运输距离的项目，数据用户应相应调整参数。

## Review details
清单： 内部审查通过几个迭代步骤完成，涉及原始数据验证、原始数据记录、代表性、完整性、与 ISO 14040 和 14044 有关的建模的一致性。
