# 电力生产 ; 电力 ; 火电（61.5%）+水电（4.9%）+核电（28.1%）+风电（1.4%）+太阳能发电（4.1%）

Dataset: ILCD process, Partly terminated system
Geography: HAIN-CN
Reference year: 2019
Classification: Energy carriers and technologies / Electricity
LCI method principle: Other
Generated by: 熊若熙, xiongrx0126@163.com
Owner: 天工LCI数据工作小组
Review: Dependent internal review by 天工LCI数据工作小组
Amounts: no units in this file; such an amount is in the reference unit of its flow, which a separate flow dataset defines
copyright: false
licenseType: Free of charge for all users and uses

## General comment
电力产生形式包括火力发电、水力发电、核能发电、风力发电和太阳能发电

## Time period
根据2019年能源统计年鉴数据计算

## Technical purpose
该数据代表了包括火力、水力、核能、风能和太阳能发电在内的工业过程中多样化的电力生产组合。这种电力被用于需要此类电力来源的各个行业和应用领域，包括住宅、商业、工业和运输部门。具体用途取决于当地基础设施和相应发电类型的可用性。

## Reference product
- Electricity: 3.6; calculated

## Outputs
- carbon dioxide: 0.463; calculated
- sulfur dioxide: 7.8e-5; calculated
- Nitrogen oxides: 0.000122657; calculated
- Dust (unspecified, from stack): 1.4874e-5; calculated

## Data treatment and extrapolations
核算方法参考《企业温室气体排放核算方法与报告指南 发电设施》。不同形式发电量及燃料用量来自于《中国能源统计年鉴 2020》中的第三章（能源生产） 和第六章（地区能源平衡表）。用于计算二氧化碳排放因子的低位发热量、单位热值含碳量等燃料参数来自于《2019 年度中国区域电网二氧化碳基准线排放因子 OM 计算说明》、《企业温室气体排放核算方法与报告指南 发电设施》

## Use advice
在使用此数据集进行生命周期评价时，应仔细考虑电力生产的特定能源组合和区域特征。需要考虑不同电源之间碳强度的变化。在模拟使用阶段时，应根据提供的百分比准确表示电力组合中火力、水力、核能、风能和太阳能的比例。为了确保温室气体排放报告的准确性，遵循《企业温室气体排放核算方法与报告指南 发电设施》中概述的方法，并确保使用相关中国年鉴和指南中规定的更新排放因子和燃料参数。

## Review details
清单： 内部审查通过几个迭代步骤完成，涉及原始数据验证、原始数据记录、代表性、完整性、与 ISO 14040 和 14044 有关的建模的一致性。

## Data sources
- 熊若熙. 中国电力生产和消费二氧化碳与污染物排放因子核算. (清华大学, 2023).
