# 土壤修复;原位修复;热脱附;尾气处理

Dataset: ILCD process, Unit process, single operation
Geography: HEN-CN
Classification: Other Services / Repair and maintenance
Generated by: 张今英, zhangjy@caep.org.cn
Owner: 天工LCI数据工作小组
Review: Dependent internal review by 天工LCI数据工作小组
Amounts: no units in this file; such an amount is in the reference unit of its flow, which a separate flow dataset defines
licenseType: Free of charge for all users and uses

## General comment
②废水废气处理，包括废水废气设备安装和运行。

## Technical purpose
该工业过程适用于原位修复被污染的土壤，通过热脱附技术并接着进行尾气处理。该过程包括安装和运行废水和废气处理设备，作为单元过程（单一操作）的一部分。

## Reference product
- materials: 30413; article inperiodical

## Inputs
All rows: article inperiodical
- Natural gas, at consumer EU-27: 28800
- Electricity: 2.016e6
- Diesel: 8.906
- water: 3477
- iron: 20367
- heavy fuel oil: 0.813

## Use advice
在使用该数据集进行生命周期评估时，必须确保与现场修复热脱附和尾气处理相关的数据适用于特定污染物和当地法规。应考虑治疗设备的能源消耗和排放来建模该过程。如果技术进步或运行参数的更改可能影响评估的准确性，则应予以考虑。根据生命周期评估研究的目标和范围，可以排除或包括设备的回收或使用寿命末期阶段。

## Review details
清单： 内部审查通过几个迭代步骤完成，涉及原始数据验证、原始数据记录、代表性、完整性、与 ISO 14040 和 14044 有关的建模的一致性。
