# 铝粉生产

Dataset: ILCD process
Geography: CN
Classification: Materials production / Metals and semimetals
Generated by: 陆嘉麒, wilsherelu@foxmail.com
Owner: 天工LCI数据工作小组
Review: Dependent internal review by 天工LCI数据工作小组
Amounts: no units in this file; such an amount is in the reference unit of its flow, which a separate flow dataset defines
copyright: false
licenseType: Free of charge for all users and uses

## Reference product
- Powdered Aluminium: 1000; missing unimportant
  铝粉产品

## Inputs
- aluminium: 1470; missing unimportant
  铝原料
- light fuel oil: 0.000647; missing unimportant
  机油（设备消耗）
- electricity mix: 36.108; missing unimportant
- water: 450; missing unimportant

## Outputs
- sulfur dioxide: 0.00118; missing unimportant
  二氧化硫[排放到大气（未指定类型）]
- Particles (PM0.2 - PM2.5): 0.288; missing unimportant
  总颗粒物[排放到大气（未指定类型）]
- municipal solid waste deposition: 0.642; missing unimportant
  生活垃圾
- waste water - untreated: 50; missing unimportant
  生活废水

## Review details
清单： 内部审查通过几个迭代步骤完成，涉及原始数据验证、原始数据记录、代表性、完整性、与 ISO 14040 和 14044 有关的建模的一致性。

## Data sources
- 垣曲金华铝粉加工环评报告
