# 土壤和地下水修复;原位;地下水抽出处理;施工;处理设施

Dataset: ILCD process, Unit process, single operation
Geography: CA
Reference year: 2007
Classification: Other Services / Repair and maintenance
Generated by: 王宁, wang_ning@caep.org.cn
Owner: 天工LCI数据工作小组
Review: Dependent internal review by 天工LCI数据工作小组
Amounts: no units in this file; such an amount is in the reference unit of its flow, which a separate flow dataset defines
copyright: false
licenseType: Free of charge for all users and uses

## General comment
使用活性炭、玻璃、乳胶建造废水处置设施

## Geography
The contaminated area was located 600 m from a river shore in the northern part of the prov-ince of Quebec， Canada.

## Technical purpose
所描述的工艺用于建造废水处置设施，专门设计用于土壤和地下水修复。修复技术涉及原位泵和处理系统。在建造过程中使用活性炭、玻璃和乳胶等材料，这表明这些设施建造用于有效处理受污染的水。对于污染源接近脆弱水体的情况特别相关，就像位于加拿大魁北克省北部河岸附近的受污染区域。

## Reference product
- Treatment facilities: 1; estimated
  在现场建造一套废水处理装置

## Inputs
- Activated Carbon: 530700; estimated
  在现场建造废水处置装置所消耗的活性炭颗粒
- Latex: 52.8; estimated
  在现场建造废水处置装置所消耗的乳胶
- Glass (formed & finished): 6264; estimated
  在现场建造废水处置装置所消耗的玻璃

## Use advice
使用此数据集的用户应考虑将治疗设施中使用的具体建筑材料作为环境影响评估的一部分。活性炭、玻璃和乳胶等材料的回收或使用寿命结束场景应仔细评估。确保准确集成地理和水文数据，特别是因为设施相对于水体的位置可能会大大影响修复效果。用户必须模拟使用阶段行为，考虑污染物类型和浓度，以及受污染区域与河岸的接近程度。

## Review details
清单： 内部审查通过几个迭代步骤完成，涉及原始数据验证、原始数据记录、代表性、完整性、与 ISO 14040 和 14044 有关的建模的一致性。
