# 太阳能电池片制造 ; 太阳能电池片 ; 半导体工艺

Dataset: ILCD process, Unit process, single operation
Geography: SC-CN
Reference year: 2013
Classification: Materials production / Metals and semimetals
Functional unit: 1 kg solar grade multi-Si
LCI method principle: Attributional
LCI method approaches: Allocation
Generated by: 杨锦锋, yjfzfshn@163.com
Owner: 天工LCI数据工作小组
Review: Dependent internal review by 天工LCI数据工作小组
Amounts: no units in this file; such an amount is in the reference unit of its flow, which a separate flow dataset defines
copyright: false
licenseType: Free of charge for all users and uses

## General comment
多晶硅

## Geography
四川某太阳能电池片生产企业

## Time period
文章发表

## Technology and included processes
半导体工艺

## Reference product
- Multi-Si solar cell: 1e6; measured
  太阳能电池片（MW）

## Inputs
All rows: measured
- Multi-Si wafer: 3420
  多晶硅片
- electricity: 55548
  电耗
- Water (fresh water): 1.23654e6
  新鲜水
- Silver Paste: 60
  银浆
- Aluminum Paste: 430
  铝浆
- Ammonia: 40
  氨气
- Silane: 10
  硅烷
- Phosphorus Oxychloride: 8
  POCl3
- Sodium hydroxide: 195
  NaOH
- Hydrochloric acid: 450
  HCl
- Hydrofluoric acid: 860
  HF
- Nitrogen oxides: 1550
  硝酸
- oxygen: 113
  氧气

## Outputs
All rows: measured
- chlorine: 81.23
  氯气
- Nitrogen oxides: 26.78
  氮氧化物
- ammonia: 31.04
  氨气
- non-methane volatile organic compounds: 33.4
  TVOC
- hydrogen chloride: 7.29
  HCl
- chloride: 15.89
  氯化物
- fluoride: 83.65
  氟化物
- nitrogen, total (excluding N2): 49.32
  TN
- chemical oxygen demand: 126.89
  COD
- industrial waste (unspecified): 283
  固体废弃物

## Deviations from the LCI method approaches
以太阳能级多晶硅为研究对象，运用 LCA的评价方法，定量计算国内普遍生产水平下，太阳能级多晶硅生命周期过程的资源、能源投入和环境排放值

## Data selection and combination
根据四川某太阳能电池片生产企业生产过程的数据资料收集整理

## Review details
清单： 内部审查通过几个迭代步骤完成，涉及原始数据验证、原始数据记录、代表性、完整性、与 ISO 14040 和 14044 有关的建模的一致性。

## Data sources
- 何洋. 太阳能级多晶硅的生命周期评价. (西南交通大学, 2013).
