# 石膏粉生产

Dataset: ILCD process
Geography: CN
Classification: Materials production / Other mineralic materials
Generated by: 陆嘉麒, wilsherelu@foxmail.com
Owner: 天工LCI数据工作小组
Review: Dependent internal review by 天工LCI数据工作小组
Amounts: no units in this file; such an amount is in the reference unit of its flow, which a separate flow dataset defines
copyright: false
licenseType: Free of charge for all users and uses

## Reference product
- Gypsum Powder: 1000; missing unimportant
  石膏粉产品

## Inputs
All rows: missing unimportant
- Limestone: 400
  石灰石
- gypsum: 880
  天然石膏
- Cellulose: 8
  纤维素
- water: 110
- electricity mix: 180.36
- process steam: 720
  蒸汽

## Outputs
- nitrous oxide: 1700; missing unimportant
  氮氧化物[排放到大气（未指定类型）]
- sulfur dioxide: 20870; missing unimportant
  二氧化硫[排放到大气（未指定类型）]
- Particles (PM0.2 - PM2.5): 25330; missing unimportant
  总颗粒物[排放到大气（未指定类型）]

## Review details
清单： 内部审查通过几个迭代步骤完成，涉及原始数据验证、原始数据记录、代表性、完整性、与 ISO 14040 和 14044 有关的建模的一致性。

## Data sources
- 永平县石膏粉厂年产 150000 吨双飞粉生产线技改扩建项目环评报告公示
