# 腻子粉生产

Dataset: ILCD process
Geography: CN
Classification: Materials production / Other mineralic materials
Generated by: 陆嘉麒, wilsherelu@foxmail.com
Owner: 天工LCI数据工作小组
Review: Dependent internal review by 天工LCI数据工作小组
Amounts: no units in this file; such an amount is in the reference unit of its flow, which a separate flow dataset defines
copyright: false
licenseType: Free of charge for all users and uses

## Reference product
- Putty Powder: 1000; missing unimportant
  腻子粉产品

## Inputs
All rows: missing unimportant
- White Portland cement: 100
  白色硅酸盐水泥
- Calcium Powder: 440
  钙粉
- Caulk Compound: 50
  胶粉
- Ordinary Portland Cement: 270
  普通硅酸盐水泥
- sand: 220
  沙子
- crushed stone 16/32: 500
  石粉
- gypsum: 160
  石膏
- Shuangfei Powder: 600
  双飞粉
- Cement: 160
  水泥
- Calcium carbonate (> 63 microns): 200
  重钙粉
- electricity mix: 122.616
- water: 320

## Outputs
- Particles (PM0.2 - PM2.5): 70; missing unimportant
  总颗粒物[排放到大气（未指定类型）]
- phosphorus, total: 1.75; missing unimportant
  总磷[排放到水体（未指定类型）]
- non-methane volatile organic compounds: 3240; missing unimportant
  non-methane volatile organic compounds[排放到大气（未指定类型）]

## Review details
清单： 内部审查通过几个迭代步骤完成，涉及原始数据验证、原始数据记录、代表性、完整性、与 ISO 14040 和 14044 有关的建模的一致性。

## Data sources
- 年产5000吨腻子粉环评报告表
